// SBML level 2 version 4

model metabogen()
  // Originally created by libAntimony v1.3 (using libSBML 3.4.1)

  // Compartments:
  compartment default_compartment = 1;

  // Species:
  species Carb1 in default_compartment = 5;
  species Carb2 in default_compartment = 0;
  species O2ext in default_compartment = 20;
  species Dext in default_compartment = 0;
  species Eext in default_compartment = 0;
  species Fext in default_compartment = 0;
  species Hext in default_compartment = 0;
  species A in default_compartment = 0;
  species B in default_compartment = 0;
  species C in default_compartment = 0;
  species D in default_compartment = 0;
  species E in default_compartment = 0;
  species F in default_compartment = 0;
  species G in default_compartment = 0;
  species H in default_compartment = 0;
  species ATP in default_compartment = 0;
  species NADH in default_compartment = 0;
  species O2 in default_compartment = 0;
  species ETc1 in default_compartment = 1e-5;
  species ETc2 in default_compartment = 1e-5;
  species ETf in default_compartment = 1e-5;
  species ETh in default_compartment = 1e-5;
  species ER1 in default_compartment = 1e-5;
  species ER2 in default_compartment = 1e-5;
  species ER3 in default_compartment = 1e-5;
  species ER4 in default_compartment = 1e-5;
  species ER5 in default_compartment = 1e-5;
  species ER6 in default_compartment = 1e-5;
  species ER7 in default_compartment = 1e-5;
  species ER8 in default_compartment = 1e-5;
  species ERres in default_compartment = 1e-5;
  species R in default_compartment = 1e-6;
  species S in default_compartment = 0.001;

  // Parameters:
  ETO2 = 1e-5;
  ETd = 1e-5;
  ETe = 1e-5;
  vO2 = 20;
  muO2 = 0.4;

  // Reactions:
  Tc1: Carb1 -> A; 3000;
  Tc2: Carb2 -> A; 2000;
  Tf: Fext -> F; 3000;
  DO2: O2ext -> O2; 1000;
  Dd: D -> Dext; 1000;
  De: E -> Eext; 1000;
  Th: Hext -> H; 3000;
  R1: A + ATP -> B; 1800;
  R2: B -> C + 2 ATP + 2 NADH; 1800;
  R3: B -> F; 1800;
  R4: C -> G; 1800;
  R5: G -> 0.8 C + 2 NADH; 1800;
  R6: C -> 2 ATP + 3 D; 1800;
  R7: C + 4 NADH -> 3 E; 1800;
  R8: G + ATP + 2 NADH -> H; 1800;
  Rres: NADH + O2 -> ATP; 1800;
  PTc1: 400 H + 1600 ATP -> ETc1; 2.5;
  PTc2: 1500 H + 6000 ATP -> ETc2; 0.67;
  PTf: 400 H + 1600 ATP -> ETf; 2.5;
  PTh: 400 H + 1600 ATP -> ETh; 2.5;
  PR1: 500 H + 2000 ATP -> ER1; 2;
  PR2: 500 H + 2000 ATP -> ER2; 2;
  PR3: 2000 H + 8000 ATP -> ER3; 0.5;
  PR4: 500 H + 2000 ATP -> ER4; 2;
  PR5: 500 H + 2000 ATP -> ER5; 2;
  PR6: 1000 H + 4000 ATP -> ER6; 1;
  PR7: 1000 H + 4000 ATP -> ER7; 1;
  PR8: 4000 H + 16000 ATP -> ER8; 0.25;
  PRres: 500 H + 2000 ATP -> ERres; 2;
  PR: 4500 H + 21000 ATP + 1500 C -> R; 0.2;
  PS: 250 H + 250 C + 250 F + 1500 ATP -> S; 3;
  vO: -> O2ext; vO2 - muO2*O2ext;
end
